// SBML level 2 version 1

model oneGene()

  // Compartments:
  compartment default = 1;
  compartment nucleus in cell = 1;
  compartment cell in default = 1;

  // Species:
  species rA in nucleus = 0;
  species mA in cell = 0;
  species Ac in cell = 0;
  species A in nucleus = 0;
  species $NTP in nucleus = 0;
  species $AA in cell = 0;
  species $S in nucleus = 1;
  species $rA_deg in nucleus = 0; rA_deg is "sa2_degraded";
  species $mA_deg in cell = 0; mA_deg is "sa3_degraded";
  species $Ac_deg in cell = 0; Ac_deg is "sa4_degraded";
  species rI in nucleus = 0;
  species mI in cell = 0;
  species I in nucleus = 0;
  species Ic in cell = 0;
  species $rI_deg in nucleus = 0; rI_deg is "sa27_degraded";
  species $mI_deg in cell = 0; mI_deg is "sa29_degraded";
  species $Ic_deg in cell = 0; Ic_deg is "sa31_degraded";

  // Parameters:
  Vs_A = 1;
  Va = 1;
  Ka_A = 1;
  kout_a = 1;
  ktl_a = 1;
  kin_A = 1;
  kout_A = 1;
  D_rA = 1;
  D_mA = 1;
  D_Ac = 1;
  Vi = 1;
  Ki_I = 1;
  kout_i = 1;
  ktl_i = 1;
  kin_I = 1;
  kout_I = 1;
  D_rI = 1;
  D_mI = 1;
  D_Ic = 1;
  Ks_A = 1;
  Vb_A = 0.1;
  Vb_I = 0.1;
  Vs_I = 1;
  Ki_A = 1;
  Ka_I = 1;
  Ks_I = 1;

  // Reactions:
  v7: Ac -> A; kin_A*Ac - kout_A*A;
  v1: $NTP => rA; Va*(A/(Ka_A + A + I*Ka_A/Ki_A))^2;  // modifiers: A, I
  v3: rA => mA; kout_a*rA;
  v5: $AA => Ac; ktl_a*mA;  // modifiers: mA
  v9: rA => $rA_deg; D_rA*rA;
  v11: mA => $mA_deg; D_mA*mA;
  v13: Ac => $Ac_deg; D_Ac*Ac;
  v2: $NTP => rI; Vi*(A/(Ka_I + A + I*Ka_I/Ki_I))^2;  // modifiers: A, I
  v4: rI => mI; kout_i*rI;
  v8: Ic -> I; kin_I*Ic - kout_I*I;
  v6: $AA => Ic; ktl_i*mI;  // modifiers: mI
  v10: rI => $rI_deg; D_rI*rI;
  v12: mI => $mI_deg; D_mI*mI;
  v14: Ic => $Ic_deg; D_Ic*Ic;
  v1b: $NTP => rA; Vb_A;
  v2b: $NTP => rI; Vb_I;
  v1s: $NTP => rA; Vs_A*S/(Ks_A + S);  // modifiers: S
  v2s: $NTP => rI; Vs_I*S/(Ks_I + S);  // modifiers: S
end
