// SBML level 2 version 3
// Generated 07-Aug-2008 09:37:28 (GMT-06:60)
// Generated by MathSBML 2.8.1 [18-July-2008]
// Generated using Mathematica Version 6.0 for Linux x86 (32-bit) (June 2, 2008)

model NFKappaBeta()
  // This model was auto-generated from xlr8r reactions by xlr8r2SBML version 0.2 alpha (02 July 2007) at 07-Aug-2008 09:37:26 (GMT-06:60)
  // This is a Systems Biology Markup Language (SBML) file, generated by MathSBML 2.8.1 [18-July-2008] 07-Aug-2008 09:37:27 (GMT-06:60). SBML is a form of XML, and most XML files will not display properly in an internet browser. To view the contents of an XML file use the "Page Source" or equivalent button on you browser.

  // Compartments:
  compartment comp = 1 volume;

  // Species:
  species NFkB in comp = 0.003053;
  species IkBa in comp = 0.372;
  species IkBa_NFkB in comp = 0.09826;
  species NFkBn in comp = 0.00047638;
  species IkBan in comp = 0.11937;
  species IkBan_NFkBn in comp = 0.001985;
  species IKK in comp = 0.1;
  species IkBat in comp = 0.008454217;
  species IKK_IkBa in comp = 0;
  species IKK_IkBa_NFkB in comp = 0;
  species _EmptySet in comp;

  // Parameters:
  a1 = 30;
  a2 = 30;
  a3 = 1.35;
  a4 = 11.1;
  tr1 = 5.4;
  tr2 = 0.0048;
  tr3 = 0.018;
  tr4 = 0.012;
  tr5 = 0;
  tr6 = 0.82944;
  d1 = 0.03;
  d2 = 0.03;
  d3 = 0.0075;
  d4 = 0.105;
  deg1 = 0.00135;
  deg2 = 0.00675;
  deg3 = 0.0168;
  k1 = 1.221;
  k2 = 0.2442;
  trb = 9.21375e-5;
  adapt = 0.0072;

  // Reactions:
  reaction1: IkBa + NFkB -> IkBa_NFkB; a1*IkBa*NFkB;
  reaction2: IkBa_NFkB -> IkBa + NFkB; d1*IkBa_NFkB;
  reaction3: IKK_IkBa + NFkB -> IKK_IkBa_NFkB; a2*IKK_IkBa*NFkB;
  reaction4: IKK_IkBa_NFkB -> IKK_IkBa + NFkB; d2*IKK_IkBa_NFkB;
  reaction5: NFkB -> NFkBn; NFkB*tr1;
  reaction6: NFkBn -> NFkB; NFkBn*tr2;
  reaction7: IkBa_NFkB -> NFkB; deg1*IkBa_NFkB;
  reaction8: IkBan + NFkBn -> IkBan_NFkBn; a1*IkBan*NFkBn;
  reaction9: IkBan_NFkBn -> IkBan + NFkBn; d1*IkBan_NFkBn;
  reaction10: IkBa + IKK -> IKK_IkBa; a3*IkBa*IKK;
  reaction11: IKK_IkBa -> IkBa + IKK; d3*IKK_IkBa;
  reaction12: IkBat -> _EmptySet; deg3*IkBat;
  reaction13: IkBa -> IkBan; IkBa*tr3;
  reaction14: IkBan -> IkBa; IkBan*tr4;
  reaction15: IKK_IkBa_NFkB -> IKK + NFkB; IKK_IkBa_NFkB*k1;
  reaction16: IKK_IkBa -> IKK; IKK_IkBa*k2;
  reaction17: -> IkBa; 2.448*IkBat*(2.448*IkBat + 10)^(-1);  // modifiers: IkBat
  reaction18: IkBa_NFkB -> IkBan_NFkBn; IkBa_NFkB*tr5;
  reaction19: IkBan_NFkBn -> IkBa_NFkB; IkBan_NFkBn*tr6;
  reaction20: IkBa -> _EmptySet; deg2*IkBa;
  reaction21: -> IkBat; 1.054986*NFkBn^2*(1.054986*NFkBn^2 + 1)^(-1);  // modifiers: NFkBn
  reaction22: _EmptySet -> IkBat; trb*_EmptySet;
  reaction23: IkBa_NFkB + IKK -> IKK_IkBa_NFkB; a4*IkBa_NFkB*IKK;
  reaction24: IKK_IkBa_NFkB -> IkBa_NFkB + IKK; d4*IKK_IkBa_NFkB;
  reaction25: IKK -> _EmptySet; adapt*IKK;
end
